SetBusXY 296569828 34.674651 -82.8329727
SetkVBase 296569828 kVLL=12.47
SetBusXY 295498746 34.6747981 -82.831464
SetkVBase 295498746 kVLL=12.47
SetBusXY 67086850-524a-4c64-b12d-a31a9e3279e5 34.67561167428637 -82.83402672986128
SetkVBase 67086850-524a-4c64-b12d-a31a9e3279e5 kVLL=12.47
SetBusXY 24ab4116-d257-41b1-960b-481ced9684f1 34.67381297784516 -82.83387399502244
SetkVBase 24ab4116-d257-41b1-960b-481ced9684f1 kVLL=12.47
SetBusXY d18f1899-f1d2-4178-b332-9b2c7518ff1c 34.67346386133547 -82.83225439945566
SetkVBase d18f1899-f1d2-4178-b332-9b2c7518ff1c kVLL=12.47
SetBusXY 302675215 34.6741564 -82.8356477
SetkVBase 302675215 kVLL=12.47
SetBusXY 113984088 34.6744666 -82.8357795
SetkVBase 113984088 kVLL=12.47
SetBusXY f078b90d-1b3b-4f3c-9ce8-7191e1c0f8a1 34.67396253553774 -82.8352913704561
SetkVBase f078b90d-1b3b-4f3c-9ce8-7191e1c0f8a1 kVLL=12.47
SetBusXY decc3e5b-e24a-4078-97d3-d34b50fb5fc8 34.67414771525664 -82.83564477659735
SetkVBase decc3e5b-e24a-4078-97d3-d34b50fb5fc8 kVLL=12.47
SetBusXY 113913040 34.6717887 -82.8348507
SetkVBase 113913040 kVLL=12.47
SetBusXY 55c0c277-83a0-46cb-b2cd-ea6b02b4a044 34.671427440062565 -82.83477249251003
SetkVBase 55c0c277-83a0-46cb-b2cd-ea6b02b4a044 kVLL=12.47
SetBusXY 11a8480b-1da6-49f2-8040-454036c30482 34.67284500375207 -82.83520626619944
SetkVBase 11a8480b-1da6-49f2-8040-454036c30482 kVLL=12.47
SetBusXY 29d18c94-50cc-4374-ab66-ee83ee1e45e7 34.671795301797644 -82.83484327050971
SetkVBase 29d18c94-50cc-4374-ab66-ee83ee1e45e7 kVLL=12.47
SetBusXY ad21eec3-b245-4f80-a3e7-f2e2f56b33e5 34.67551068121881 -82.8364073886983
SetkVBase ad21eec3-b245-4f80-a3e7-f2e2f56b33e5 kVLL=12.47
SetBusXY 4ed9d518-66f4-428c-884e-b116c0a94342 34.67447331389393 -82.8357867810108
SetkVBase 4ed9d518-66f4-428c-884e-b116c0a94342 kVLL=12.47
SetBusXY d65c1dd3-bd70-4490-9bc9-5c2da8f7e82c 34.674766110737096 -82.83149999987926
SetkVBase d65c1dd3-bd70-4490-9bc9-5c2da8f7e82c kVLL=12.47
SetBusXY dae7b755-4e43-4d99-abba-eebd2682834e 34.67562021452478 -82.83403022187656
SetkVBase dae7b755-4e43-4d99-abba-eebd2682834e kVLL=12.47
SetBusXY ff4e789f-8cc0-412d-801f-775a88fd5d87 34.67561267428637 -82.83402572986128
SetkVBase ff4e789f-8cc0-412d-801f-775a88fd5d87 kVLL=0.48
SetBusXY 19bd08d3-a3aa-4eb9-95a0-141db869b8b8 34.676416546435696 -82.83789415674269
SetkVBase 19bd08d3-a3aa-4eb9-95a0-141db869b8b8 kVLL=12.47
SetBusXY 902a2eb2-e22a-4f2e-9080-a017c7b9ea32 34.676697872002414 -82.83743346016078
SetkVBase 902a2eb2-e22a-4f2e-9080-a017c7b9ea32 kVLL=12.47
SetBusXY 129f96e7-ea7e-4cd5-bdb6-d50f6f7bf437 34.675480397982774 -82.83687893263095
SetkVBase 129f96e7-ea7e-4cd5-bdb6-d50f6f7bf437 kVLL=12.47
SetBusXY 18df96d8-a15c-4473-95ae-8731c654a42a 34.676417546435694 -82.8378931567427
SetkVBase 18df96d8-a15c-4473-95ae-8731c654a42a kVLL=0.48
SetBusXY 3d69988e-d438-41d1-8509-a035e81e2f4e 34.67381397784516 -82.83387299502245
SetkVBase 3d69988e-d438-41d1-8509-a035e81e2f4e kVLL=0.48
SetBusXY 9114e66f-a106-462e-926c-48a6fe17b5ce 34.678774237588755 -82.83531986933309
SetkVBase 9114e66f-a106-462e-926c-48a6fe17b5ce kVLL=12.47
SetBusXY 9e1a569f-5918-48ff-84d5-50a341fb5b20 34.67899936655315 -82.83660594094499
SetkVBase 9e1a569f-5918-48ff-84d5-50a341fb5b20 kVLL=12.47
SetBusXY a8200e82-da3c-4729-ae6d-d48081aa6c3a 34.67818228604554 -82.83507782646066
SetkVBase a8200e82-da3c-4729-ae6d-d48081aa6c3a kVLL=12.47
SetBusXY e2b17ec5-7234-4634-99f3-13b33e8ee391 34.67876523545962 -82.8353204364696
SetkVBase e2b17ec5-7234-4634-99f3-13b33e8ee391 kVLL=12.47
SetBusXY dcde0bfe-3a3d-4ff8-8a75-7cc11b4d34a1 34.67877523758875 -82.8353188693331
SetkVBase dcde0bfe-3a3d-4ff8-8a75-7cc11b4d34a1 kVLL=0.48
SetBusXY 953eec14-bc83-47d7-8c8e-bfc34fb0b9c5 34.67695093780922 -82.8354347377012
SetkVBase 953eec14-bc83-47d7-8c8e-bfc34fb0b9c5 kVLL=12.47
SetBusXY 5a20152a-ce44-46d8-812f-5073827bab0f 34.67765814566613 -82.8346712555593
SetkVBase 5a20152a-ce44-46d8-812f-5073827bab0f kVLL=12.47
SetBusXY 0d723b81-d3cc-4b5e-9604-b94e1579d6da 34.677414916089354 -82.8354055069469
SetkVBase 0d723b81-d3cc-4b5e-9604-b94e1579d6da kVLL=12.47
SetBusXY 79b5b874-4748-484a-9185-e5d5b14abc7d 34.676951937809214 -82.83543373770121
SetkVBase 79b5b874-4748-484a-9185-e5d5b14abc7d kVLL=0.48
SetBusXY 4cb1e7c3-c716-481d-a9cc-7b522f1ad926 34.67346486133547 -82.83225339945567
SetkVBase 4cb1e7c3-c716-481d-a9cc-7b522f1ad926 kVLL=0.48
SetBusXY ef7e1cf1-f33b-4256-8a55-ad94fbc7a080 34.67551168121881 -82.83640638869831
SetkVBase ef7e1cf1-f33b-4256-8a55-ad94fbc7a080 kVLL=0.48
SetBusXY de10576a-aa0f-4038-996c-4d5448b524f5 34.67795572311708 -82.8368699910099
SetkVBase de10576a-aa0f-4038-996c-4d5448b524f5 kVLL=12.47
SetBusXY fde6c6f0-66f1-43ee-94bb-65c3f330bd74 34.67900036655315 -82.836604940945
SetkVBase fde6c6f0-66f1-43ee-94bb-65c3f330bd74 kVLL=0.48
SetBusXY 35affd0b-0310-47a0-852f-21aafab0bb12 34.677087559093025 -82.83382788718363
SetkVBase 35affd0b-0310-47a0-852f-21aafab0bb12 kVLL=12.47
SetBusXY 55b8b78c-31cd-4574-90aa-bf37208faea1 34.67765914566613 -82.8346702555593
SetkVBase 55b8b78c-31cd-4574-90aa-bf37208faea1 kVLL=0.48
SetBusXY 5ff9a8dc-e808-48b4-9a51-b4ef0c8aae7d 34.67142844006256 -82.83477149251003
SetkVBase 5ff9a8dc-e808-48b4-9a51-b4ef0c8aae7d kVLL=0.48
SetBusXY 1e49a5a7-cec4-415a-8ea3-33f157d3592a 34.67708855909302 -82.83382688718363
SetkVBase 1e49a5a7-cec4-415a-8ea3-33f157d3592a kVLL=0.48
SetBusXY c06e8b04-406c-4505-9a7d-caa26d521809 34.67669887200241 -82.83743246016078
SetkVBase c06e8b04-406c-4505-9a7d-caa26d521809 kVLL=0.48
SetBusXY 19d1eb19-8c54-4ed6-96d5-f236737eb4a8 34.67795672311708 -82.83686899100991
SetkVBase 19d1eb19-8c54-4ed6-96d5-f236737eb4a8 kVLL=0.48
SetBusXY 8d61ce66-3ce3-48f6-8819-7aacd2c1c768 34.67396353553774 -82.83529037045611
SetkVBase 8d61ce66-3ce3-48f6-8819-7aacd2c1c768 kVLL=0.48
SetBusXY 41ba0b4f-87ad-492e-b9fb-2b283e689571 34.67278557144413 -82.83372884696622
SetkVBase 41ba0b4f-87ad-492e-b9fb-2b283e689571 kVLL=12.47
SetBusXY 486c4420-a93c-4793-8fee-92bb4e3f6c8b 34.67377584109062 -82.83261442342274
SetkVBase 486c4420-a93c-4793-8fee-92bb4e3f6c8b kVLL=12.47
SetBusXY 7cb66b0f-7d12-40c3-9ac3-48e0ffa241d4 34.676901250285155 -82.83455402416861
SetkVBase 7cb66b0f-7d12-40c3-9ac3-48e0ffa241d4 kVLL=12.47
SetBusXY 29160497-d557-46ef-953b-030985e86c82 34.675516140576136 -82.83359138789271
SetkVBase 29160497-d557-46ef-953b-030985e86c82 kVLL=0.48
SetBusXY 127a487f-f8e5-49e2-8b09-bb7318466844 34.675516140576136 -82.83404127497106
SetkVBase 127a487f-f8e5-49e2-8b09-bb7318466844 kVLL=0.48
SetBusXY 21a5c737-9853-4b91-9264-5bba7071c44a 34.675516140576136 -82.8344911620494
SetkVBase 21a5c737-9853-4b91-9264-5bba7071c44a kVLL=0.48
SetBusXY e5130a20-ee25-47f4-b59a-5f8ae412150f 34.676095030681786 -82.83802487742742
SetkVBase e5130a20-ee25-47f4-b59a-5f8ae412150f kVLL=0.48
SetBusXY 9037afbd-26b1-473f-ba3f-1eb50330816e 34.67654491776013 -82.83802487742742
SetkVBase 9037afbd-26b1-473f-ba3f-1eb50330816e kVLL=0.48
SetBusXY 328d9cba-e71e-4b41-8d16-17c65132a7be 34.67654491776013 -82.83757499034907
SetkVBase 328d9cba-e71e-4b41-8d16-17c65132a7be kVLL=0.48
SetBusXY 3d6b4f5c-c488-449a-8284-c2d6435de91a 34.67389461251987 -82.8341332036869
SetkVBase 3d6b4f5c-c488-449a-8284-c2d6435de91a kVLL=0.48
SetBusXY 0cb1a779-c071-4340-ad2c-7c68bdf0a47a 34.67344472544152 -82.8341332036869
SetkVBase 0cb1a779-c071-4340-ad2c-7c68bdf0a47a kVLL=0.48
SetBusXY 981ffc73-311c-4f88-aac2-78db9d7f11af 34.67389461251987 -82.83368331660856
SetkVBase 981ffc73-311c-4f88-aac2-78db9d7f11af kVLL=0.48
SetBusXY bae1a80a-5d8e-4d74-83d6-0a98d65b0a47 34.67434449959821 -82.83368331660856
SetkVBase bae1a80a-5d8e-4d74-83d6-0a98d65b0a47 kVLL=0.48
SetBusXY 437ebea5-9e6b-478d-a29c-246fb6dfe631 34.67479438667656 -82.83368331660856
SetkVBase 437ebea5-9e6b-478d-a29c-246fb6dfe631 kVLL=0.48
SetBusXY 8fae7822-2811-4dc2-9d00-91a9d534c978 34.672994838363174 -82.8341332036869
SetkVBase 8fae7822-2811-4dc2-9d00-91a9d534c978 kVLL=0.48
SetBusXY 744ce767-07e3-40b1-bb84-8555722e3128 34.67479438667656 -82.83323342953021
SetkVBase 744ce767-07e3-40b1-bb84-8555722e3128 kVLL=0.48
SetBusXY be03ea98-df62-4721-9c08-8e87b6970974 34.67822566884535 -82.83552530376744
SetkVBase be03ea98-df62-4721-9c08-8e87b6970974 kVLL=0.48
SetBusXY 84400613-fdf5-465c-bb59-25bccc63e964 34.67822566884535 -82.8350754166891
SetkVBase 84400613-fdf5-465c-bb59-25bccc63e964 kVLL=0.48
SetBusXY f7bfc679-f893-49df-a34b-c7f2d8975c85 34.6786755559237 -82.8350754166891
SetkVBase f7bfc679-f893-49df-a34b-c7f2d8975c85 kVLL=0.48
SetBusXY f65ebc47-745c-47ea-88a7-abd23fb2fdfc 34.67912544300204 -82.8350754166891
SetkVBase f65ebc47-745c-47ea-88a7-abd23fb2fdfc kVLL=0.48
SetBusXY 481b4156-086d-4718-8c63-dc41bfd4f4c9 34.67666049233399 -82.83588311852799
SetkVBase 481b4156-086d-4718-8c63-dc41bfd4f4c9 kVLL=0.48
SetBusXY 733b5182-ae82-43e4-8e87-502cf52aff85 34.67666049233399 -82.83633300560633
SetkVBase 733b5182-ae82-43e4-8e87-502cf52aff85 kVLL=0.48
SetBusXY ce68466a-3c9d-4b70-984d-39c2d4c83dfc 34.67666049233399 -82.83543323144964
SetkVBase ce68466a-3c9d-4b70-984d-39c2d4c83dfc kVLL=0.48
SetBusXY 62926cbf-a806-462a-874d-2491ae8f4891 34.67666049233399 -82.8349833443713
SetkVBase 62926cbf-a806-462a-874d-2491ae8f4891 kVLL=0.48
SetBusXY 6d91fa46-2def-41ac-a44e-0ec1ed25e35a 34.67711037941233 -82.83543323144964
SetkVBase 6d91fa46-2def-41ac-a44e-0ec1ed25e35a kVLL=0.48
SetBusXY 38ddcca1-5a42-4440-b875-c6aab7f58750 34.67756026649068 -82.83543323144964
SetkVBase 38ddcca1-5a42-4440-b875-c6aab7f58750 kVLL=0.48
SetBusXY d941df2e-20f2-4710-ba05-61ee4d06caa4 34.67711037941233 -82.8349833443713
SetkVBase d941df2e-20f2-4710-ba05-61ee4d06caa4 kVLL=0.48
SetBusXY 68b90fa4-32a9-48f6-822a-5c14e0262d7a 34.67225655616608 -82.83226206433518
SetkVBase 68b90fa4-32a9-48f6-822a-5c14e0262d7a kVLL=0.48
SetBusXY b60382ca-98a1-4b75-b523-efddb361e17c 34.67270644324443 -82.83226206433518
SetkVBase b60382ca-98a1-4b75-b523-efddb361e17c kVLL=0.48
SetBusXY 1e683ae3-a73e-4457-a587-085dbb419fa5 34.67360621740112 -82.83271195141353
SetkVBase 1e683ae3-a73e-4457-a587-085dbb419fa5 kVLL=0.48
SetBusXY c9b6ab2c-36b4-4ee9-bc4e-1a63cb1590b7 34.67360621740112 -82.83226206433518
SetkVBase c9b6ab2c-36b4-4ee9-bc4e-1a63cb1590b7 kVLL=0.48
SetBusXY 781b2dc1-d43f-410d-8d73-5d054884a778 34.673156330322776 -82.83226206433518
SetkVBase 781b2dc1-d43f-410d-8d73-5d054884a778 kVLL=0.48
SetBusXY 7250aede-c77c-468f-b25a-45b6a36d4472 34.67360621740112 -82.83181217725684
SetkVBase 7250aede-c77c-468f-b25a-45b6a36d4472 kVLL=0.48
SetBusXY bd90ac5e-9f30-4582-9f5c-54eca933fcdc 34.67360621740112 -82.83136229017849
SetkVBase bd90ac5e-9f30-4582-9f5c-54eca933fcdc kVLL=0.48
SetBusXY 6239cbb1-bf4c-471e-be1f-890a778af58e 34.67405610447947 -82.83226206433518
SetkVBase 6239cbb1-bf4c-471e-be1f-890a778af58e kVLL=0.48
SetBusXY e33a7c36-8f7f-4bc7-b053-54f55c890e5e 34.674505991557815 -82.83226206433518
SetkVBase e33a7c36-8f7f-4bc7-b053-54f55c890e5e kVLL=0.48
SetBusXY 9198bd4c-8e28-4ef6-8649-f795662f7e47 34.67498896011274 -82.83644572701454
SetkVBase 9198bd4c-8e28-4ef6-8649-f795662f7e47 kVLL=0.48
SetBusXY aeadcd37-355f-4dd5-b765-7f68478228a0 34.67498896011274 -82.83689561409288
SetkVBase aeadcd37-355f-4dd5-b765-7f68478228a0 kVLL=0.48
SetBusXY 38360e68-8bfd-42b0-8464-b194c6e1dc1d 34.675888734269435 -82.83689561409288
SetkVBase 38360e68-8bfd-42b0-8464-b194c6e1dc1d kVLL=0.48
SetBusXY cf58f485-69e7-4aa0-8336-7281d0779549 34.67543884719109 -82.83689561409288
SetkVBase cf58f485-69e7-4aa0-8336-7281d0779549 kVLL=0.48
SetBusXY 64aced96-2084-4e76-adcb-c62b326a9160 34.675888734269435 -82.83644572701454
SetkVBase 64aced96-2084-4e76-adcb-c62b326a9160 kVLL=0.48
SetBusXY 93a748b0-12e1-46b5-ae71-8db863f5527e 34.675888734269435 -82.83599583993619
SetkVBase 93a748b0-12e1-46b5-ae71-8db863f5527e kVLL=0.48
SetBusXY a16ea384-8006-4c87-8506-1c3e7fcd55e9 34.675888734269435 -82.83554595285784
SetkVBase a16ea384-8006-4c87-8506-1c3e7fcd55e9 kVLL=0.48
SetBusXY 05c6d8b1-ea32-44e1-85c1-3d5def65086a 34.6789769331063 -82.8366485
SetkVBase 05c6d8b1-ea32-44e1-85c1-3d5def65086a kVLL=0.48
SetBusXY 7f6c8c4f-610f-48c1-8ed5-0ea509defebb 34.677362093357964 -82.83518907802765
SetkVBase 7f6c8c4f-610f-48c1-8ed5-0ea509defebb kVLL=0.48
SetBusXY cd609c28-61d1-4d7f-8611-1286eb18ce70 34.677362093357964 -82.8347391909493
SetkVBase cd609c28-61d1-4d7f-8611-1286eb18ce70 kVLL=0.48
SetBusXY 2f15e681-d391-49f9-ac6c-e9471ca7e957 34.67781198043631 -82.83518907802765
SetkVBase 2f15e681-d391-49f9-ac6c-e9471ca7e957 kVLL=0.48
SetBusXY 851c3c74-63d9-4b68-8756-89bd42e7d788 34.67781198043631 -82.8347391909493
SetkVBase 851c3c74-63d9-4b68-8756-89bd42e7d788 kVLL=0.48
SetBusXY c3f2cf9c-f9a2-4415-8fac-a6aa9ccdd5bd 34.677362093357964 -82.83428930387096
SetkVBase c3f2cf9c-f9a2-4415-8fac-a6aa9ccdd5bd kVLL=0.48
SetBusXY 88ceb0dc-ab48-4b87-a001-0a6b423266e9 34.67826186751466 -82.8347391909493
SetkVBase 88ceb0dc-ab48-4b87-a001-0a6b423266e9 kVLL=0.48
SetBusXY d764f7e6-4c13-40b0-a282-93fc2ac856a3 34.67826186751466 -82.83428930387096
SetkVBase d764f7e6-4c13-40b0-a282-93fc2ac856a3 kVLL=0.48
SetBusXY 51e400dd-7c7c-4f5a-89da-c0f4ea619a3a 34.671427440062565 -82.83477249251003
SetkVBase 51e400dd-7c7c-4f5a-89da-c0f4ea619a3a kVLL=0.48
SetBusXY 29399485-4f29-4710-af7f-6791e8fc381b 34.677237341899364 -82.83386833456396
SetkVBase 29399485-4f29-4710-af7f-6791e8fc381b kVLL=0.48
SetBusXY 900b5abc-ec7f-4ae4-8ff5-a5ed8b86eced 34.67678745482102 -82.83386833456396
SetkVBase 900b5abc-ec7f-4ae4-8ff5-a5ed8b86eced kVLL=0.48
SetBusXY ae567475-3545-497c-be4e-e6840d81ed46 34.67676039223163 -82.83779866451812
SetkVBase ae567475-3545-497c-be4e-e6840d81ed46 kVLL=0.48
SetBusXY d667039e-ce84-40cc-ab17-3f2aaf2a92e1 34.67676039223163 -82.83734877743977
SetkVBase d667039e-ce84-40cc-ab17-3f2aaf2a92e1 kVLL=0.48
SetBusXY f7166f81-0227-4186-aae6-5131a81df5a3 34.677210279309975 -82.83779866451812
SetkVBase f7166f81-0227-4186-aae6-5131a81df5a3 kVLL=0.48
SetBusXY b26a4225-f708-485a-9e6b-7e32e39685b8 34.67631050515328 -82.83734877743977
SetkVBase b26a4225-f708-485a-9e6b-7e32e39685b8 kVLL=0.48
SetBusXY 779d9f78-74a0-4a10-bea4-0ffcd03ea93d 34.67808929130613 -82.8369137286446
SetkVBase 779d9f78-74a0-4a10-bea4-0ffcd03ea93d kVLL=0.48
SetBusXY b9d3e2b6-9c11-45aa-ac31-6450e3001efa 34.67763940422778 -82.8369137286446
SetkVBase b9d3e2b6-9c11-45aa-ac31-6450e3001efa kVLL=0.48
SetBusXY e1fc24b3-1f74-44a3-9f8e-11bca00319f0 34.673739702618114 -82.83513455703985
SetkVBase e1fc24b3-1f74-44a3-9f8e-11bca00319f0 kVLL=0.48
SetBusXY f02a51c5-0487-49fe-a53c-19f24b979cad 34.673739702618114 -82.8355844441182
SetkVBase f02a51c5-0487-49fe-a53c-19f24b979cad kVLL=0.48
SetBusXY 5ad8d989-5e23-4e96-96cd-4b3ef77cb000 34.67328981553977 -82.83513455703985
SetkVBase 5ad8d989-5e23-4e96-96cd-4b3ef77cb000 kVLL=0.48
SetBusXY 3e990ed5-8add-498e-b152-f419eef4e798 34.67418958969646 -82.83513455703985
SetkVBase 3e990ed5-8add-498e-b152-f419eef4e798 kVLL=0.48
SetBusXY 6a9640e9-3a56-412d-b2b0-6dce205c554b 34.67463947677481 -82.83513455703985
SetkVBase 6a9640e9-3a56-412d-b2b0-6dce205c554b kVLL=0.48
SetBusXY 0754658c-cea4-4c89-bfea-cc44efdade3f 34.67328981553977 -82.8346846699615
SetkVBase 0754658c-cea4-4c89-bfea-cc44efdade3f kVLL=0.48
SetBusXY 641fc047-02cc-4bd0-ac73-5d4d6561c687 34.673739702618114 -82.83603433119654
SetkVBase 641fc047-02cc-4bd0-ac73-5d4d6561c687 kVLL=0.48
SetBusXY 79b5b874-4748-484a-9185-e5d5b14abc7d_ht 34.676951937809214 -82.83543373770121
SetkVBase 79b5b874-4748-484a-9185-e5d5b14abc7d_ht kVLL=12.47
SetBusXY 3d69988e-d438-41d1-8509-a035e81e2f4e_ht 34.67381397784516 -82.83387299502245
SetkVBase 3d69988e-d438-41d1-8509-a035e81e2f4e_ht kVLL=12.47
SetBusXY 1e49a5a7-cec4-415a-8ea3-33f157d3592a_ht 34.67708855909302 -82.83382688718363
SetkVBase 1e49a5a7-cec4-415a-8ea3-33f157d3592a_ht kVLL=12.47
SetBusXY ef7e1cf1-f33b-4256-8a55-ad94fbc7a080_ht 34.67551168121881 -82.83640638869831
SetkVBase ef7e1cf1-f33b-4256-8a55-ad94fbc7a080_ht kVLL=12.47
SetBusXY dcde0bfe-3a3d-4ff8-8a75-7cc11b4d34a1_ht 34.67877523758875 -82.8353188693331
SetkVBase dcde0bfe-3a3d-4ff8-8a75-7cc11b4d34a1_ht kVLL=12.47
SetBusXY 19d1eb19-8c54-4ed6-96d5-f236737eb4a8_ht 34.67795672311708 -82.83686899100991
SetkVBase 19d1eb19-8c54-4ed6-96d5-f236737eb4a8_ht kVLL=12.47
SetBusXY fde6c6f0-66f1-43ee-94bb-65c3f330bd74_ht 34.67900036655315 -82.836604940945
SetkVBase fde6c6f0-66f1-43ee-94bb-65c3f330bd74_ht kVLL=12.47
SetBusXY ff4e789f-8cc0-412d-801f-775a88fd5d87_ht 34.67561267428637 -82.83402572986128
SetkVBase ff4e789f-8cc0-412d-801f-775a88fd5d87_ht kVLL=12.47
SetBusXY 8d61ce66-3ce3-48f6-8819-7aacd2c1c768_ht 34.67396353553774 -82.83529037045611
SetkVBase 8d61ce66-3ce3-48f6-8819-7aacd2c1c768_ht kVLL=12.47
SetBusXY 4cb1e7c3-c716-481d-a9cc-7b522f1ad926_ht 34.67346486133547 -82.83225339945567
SetkVBase 4cb1e7c3-c716-481d-a9cc-7b522f1ad926_ht kVLL=12.47
SetBusXY 55b8b78c-31cd-4574-90aa-bf37208faea1_ht 34.67765914566613 -82.8346702555593
SetkVBase 55b8b78c-31cd-4574-90aa-bf37208faea1_ht kVLL=12.47
SetBusXY 5ff9a8dc-e808-48b4-9a51-b4ef0c8aae7d_ht 34.67142844006256 -82.83477149251003
SetkVBase 5ff9a8dc-e808-48b4-9a51-b4ef0c8aae7d_ht kVLL=12.47
SetBusXY c06e8b04-406c-4505-9a7d-caa26d521809_ht 34.67669887200241 -82.83743246016078
SetkVBase c06e8b04-406c-4505-9a7d-caa26d521809_ht kVLL=12.47
SetBusXY 18df96d8-a15c-4473-95ae-8731c654a42a_ht 34.676417546435694 -82.8378931567427
SetkVBase 18df96d8-a15c-4473-95ae-8731c654a42a_ht kVLL=12.47
